// SBML level 2 version 3

model temp()

  // Compartments:
  compartment cell = 1;

  // Species:
  species TGFb_r in cell = TGFb_0; TGFb_r is "TGFb(r)";
  species IL6_r in cell = IL6_0; IL6_r is "IL6(r)";
  species S3 in cell = IL6R_0; S3 is "IL6R(activity~I,l_bind,stat3_site)";
  species S4 in cell = SMAD3_0; S4 is "SMAD3(phos~U,pka_site,smad4_site,stat3_site)";
  species SMAD4_s3_site in cell = SMAD4_0; SMAD4_s3_site is "SMAD4(s3_site)";
  species STAT3m_il6r_site in cell = STAT3m_0; STAT3m_il6r_site is "STAT3m(il6r_site)";
  species PKA_activity_I_s3s4_site in cell = PKA_0; PKA_activity_I_s3s4_site is "PKA(activity~I,s3s4_site)";
  species S8 in cell = 0; S8 is "IL6(r!1).IL6R(activity~I,l_bind!1,stat3_site)";
  species S9 in cell = 0; S9 is "SMAD3(phos~P,pka_site,smad4_site,stat3_site)";
  species S10 in cell = 0; S10 is "IL6(r!1).IL6R(activity~A,l_bind!1,stat3_site)";
  species S11 in cell = 0; S11 is "SMAD3(phos~P,pka_site,smad4_site!1,stat3_site).SMAD4(s3_site!1)";
  species S12 in cell = 0; S12 is "IL6(r!1).IL6R(activity~A,l_bind!1,stat3_site!2).STAT3m(il6r_site!2)";
  species S13 in cell = 0; S13 is "PKA(activity~A,s3s4_site!1).SMAD3(phos~P,pka_site!1,smad4_site!2,stat3_site).SMAD4(s3_site!2)";
  species S14 in cell = 0; S14 is "IL6R(activity~I,l_bind,stat3_site!1).STAT3m(il6r_site!1)";
  species STAT3d_active_s3_site in cell = 0; STAT3d_active_s3_site is "STAT3d_active(s3_site)";
  species S16 in cell = 0; S16 is "IL6(r!1).IL6R(activity~I,l_bind!1,stat3_site!2).STAT3m(il6r_site!2)";
  species S17 in cell = 0; S17 is "SMAD3(phos~P,pka_site,smad4_site,stat3_site!1).STAT3d_active(s3_site!1)";

  // Parameters:
  TGFb_0 = 1;
  IL6_0 = 0;
  kf_il6_bind = 0.1;
  kr_il6_bind = 0.1;
  k_act_il6r = 0.5;
  k_inact_il6r = 0.05;
  k_phos_smad3 = 0.1;
  k_dephos_smad3 = 0.05;
  kf_stat3_bind = 1;
  Kd_stat3_bind = 0.1;
  k_stat3_dimer = 0.1;
  k_deact_stat3 = 0.05;
  kf_s3s4 = 1;
  Kd_s3s4 = 0.1;
  kf_s3stat3d = 1;
  kr_s3stat3d = 0.1;
  kf_pka_bind = 1;
  Kd_pka_bind = 0.1;
  IL6R_0 = 100;
  SMAD3_0 = 100;
  SMAD4_0 = 50;
  STAT3m_0 = 100;
  PKA_0 = 50;
  _rateLaw1 = kf_stat3_bind*Kd_stat3_bind;
  _rateLaw2 = kf_s3s4*Kd_s3s4;
  _rateLaw3 = kf_pka_bind*Kd_pka_bind;

  // Assignment rules:
  Free_TGFb_obs := 0 + TGFb_r;
  IL6R_Active := S10 + S12;
  Free_IL6_obs := 0 + IL6_r;
  pSMAD3_obs := S9 + S11 + S13 + S17;
  STAT3d_active_obs := STAT3d_active_s3_site + S17;
  S3S4_complex_obs := S11 + S13;
  S3STAT3d_complex_obs := 0 + S17;
  PKA_active := 0 + S13;

  // Reactions:
  R1: IL6_r + S3 => S8; kf_il6_bind*IL6_r*S3;
  R2: TGFb_r + S4 => TGFb_r + S9; k_phos_smad3*TGFb_r*S4;
  R3: S8 => IL6_r + S3; kr_il6_bind*S8;
  R4: S8 => S10; k_act_il6r*S8;
  R5: S9 => S4; k_dephos_smad3*S9;
  R6: SMAD4_s3_site + S9 => S11; kf_s3s4*SMAD4_s3_site*S9;
  R7: S10 => IL6_r + S3; k_inact_il6r*S10;
  R8: STAT3m_il6r_site + S10 => S12; kf_stat3_bind*STAT3m_il6r_site*S10;
  R9: S11 => SMAD4_s3_site + S9; _rateLaw2*S11;
  R10: PKA_activity_I_s3s4_site + S11 => S13; kf_pka_bind*PKA_activity_I_s3s4_site*S11;
  R11: S12 => IL6_r + S14; k_inact_il6r*S12;
  R12: S12 => STAT3m_il6r_site + S10; _rateLaw1*S12;
  R13: STAT3m_il6r_site + S12 => S10 + STAT3d_active_s3_site; k_stat3_dimer*STAT3m_il6r_site*S12;
  R14: S13 => PKA_activity_I_s3s4_site + S11; _rateLaw3*S13;
  R15: IL6_r + S14 => S16; kf_il6_bind*IL6_r*S14;
  R16: STAT3d_active_s3_site => STAT3m_il6r_site + STAT3m_il6r_site; k_deact_stat3*STAT3d_active_s3_site;
  R17: S9 + STAT3d_active_s3_site => S17; kf_s3stat3d*S9*STAT3d_active_s3_site;
  R18: S16 => IL6_r + S14; kr_il6_bind*S16;
  R19: S16 => S12; k_act_il6r*S16;
  R20: S17 => S9 + STAT3d_active_s3_site; kr_s3stat3d*S17;

  // Unit definitions:
  unit substance = item;
end
